// COMSOL Multiphysics 6.3.0.290 model "Replication Exact (Successful) -Added Fluid.mph"
// Outline of the model tree

Variables
  var1 "Variables 1"
    Tinf = 313.15[K]

Couplings
  aveop1: Average "Avg fluid temp" on domains 2 | opname = avg

Probes
  pdom1: DomainPoint "Domain Point Probe 1" | coords = {0, 0, 25.75}
    ppb1: PointExpr "Core" | expr = T2; unit = °C; descr = Temperature; table = tbl1
  bnd1: Boundary "Casing Average Temp" on boundaries 19, 21-23, 30
    expr = T2
    unit = °C
    descr = Temperature
    frame = spatial
    table = tbl1
  bnd2: Boundary "Average h1" on boundaries 23
    expr = abs(ht2.ntflux/(T2-avg(T2)))
    unit = W/(m^2*K)
    frame = spatial
    table = tbl2
  bnd3: Boundary "Average h1.1" on boundaries 19
    expr = abs(ht2.ntflux/(T2-avg(T2)))
    unit = W/(m^2*K)
    frame = spatial
    table = tbl2
  bnd4: Boundary "Average h1.2" on boundaries 22
    expr = abs(ht2.ntflux/(T2-avg(T2)))
    unit = W/(m^2*K)
    frame = spatial
    table = tbl2
  bnd5: Boundary "Average h1.3" on boundaries 30
    expr = abs(ht2.ntflux/(T2-avg(T2)))
    unit = W/(m^2*K)
    frame = spatial
    table = tbl2
  bnd6: Boundary "Average h1.4" on boundaries 21
    expr = abs(ht2.ntflux/(T2-avg(T2)))
    unit = W/(m^2*K)
    frame = spatial
    table = tbl2

Geometry
  geom1 "Geometry 1" (3D, length unit mm)
    imp1: Import
      type = cad
      filename = Y:\DC Link Capacitor\CADS 1.2\Geometry with better symmetry.STEP
      lengthunittype = cad
      assemblycomponentstype = cad
      virtualgeometrytype = cad
      objectstoimporttype = cad
      layerstype = cad
      drillholestype = cad
      componentsstype = cad
      compattrtag = imp1.component
      cellstype = cad
      arcrecognitiontype = cad
      simplifytype = cad
      cadtype = STEP
    fin: Finalize "Form Union"

Materials
  mat1: Common "Core" on domains 5
    def: def "Basic"
      thermalconductivity = diag{1.1362, 0.22, 0.22}
      density = 907.17
      heatcapacity = 1888.14
  mat2: Common "Epoxy Resin" on domains 4
    def: def "Basic"
      thermalconductivity = 0.15
      density = 1820
      heatcapacity = 1340
  mat3: Common "PPS" on domains 3
    def: def "Basic"
      thermalconductivity = 15
      density = 1650
      heatcapacity = 1000
  mat4: Common "Oil Corrected" on domains 2
    def: def "Basic"
      thermalconductivity = 0.13
      density = 880
      heatcapacity = 1900
      dynamicviscosity = 0.025
  mat5: Common "Aluminum" on domains 1
    def: def "Basic"
      relpermeability = 1
      heatcapacity = 900[J/(kg*K)]
      thermalconductivity = 238[W/(m*K)]
      electricconductivity = 3.774e7[S/m]
      relpermittivity = 1
      thermalexpansioncoefficient = 23e-6[1/K]
      density = 2700[kg/m^3]
    Enu: Enu "Young's modulus and Poisson's ratio"
      E = 70[GPa]
      nu = 0.33
    Murnaghan: Murnaghan
      l = -250[GPa]
      m = -330[GPa]
      n = -350[GPa]

Physics
  ht2: HeatTransferInSolidsAndFluids on all domains
    dependent variable T2
    ShapeProperty.order_temperature = 1
    solid1: SolidHeatTransferModel "Solid 1" (default)
    fluid1: FluidHeatTransferModel "Fluid 1" on domains 2
    init1: init "Initial Values 1" (default) | Tinit = Tinf
    ins1: ThermalInsulation (default)
    hs1: HeatSource on domains 5 | heatSourceType = HeatRate; P0 = 0.357
    hf1: HeatFluxBoundary "Heat Flux 1" on boundaries 1, 3, 6, 7, 35
      HeatFluxType = ConvectiveHeatFlux
      h = 5
      Text = Tinf
    sym1: Symmetry on boundaries 2, 5, 9, 15, 20, 25
    ifl1: Inflow on boundaries 11 | Tustr = Tinf
    ofl1: ConvectiveOutflow "Outflow 1" on boundaries 33
    sar1: SurfaceToAmbientRadiation on boundaries 1, 3, 6, 7, 35
      epsilon_rad_mat = userdef
      epsilon_rad = 0.05
      Tamb = Tinf
  spf: TurbulentFlowRealizablekeps "Turbulent Flow, Realizable k-ε" on domains 2
    dependent variable u = {u, v, w}
    PhysicalModelProperty.Compressibility = WeaklyCompressible
    AdvancedSettingProperty.UsePseudoTime = 1
    fp1: FluidProperties (default)
    init1: init "Initial Values 1" (default)
    wallbc1: WallBC "Wall 1" (default)
    inl1: InletBoundary "Inlet 1" on boundaries 11 | BoundaryCondition = MassFlow; mfr = 0.0733
    out1: OutletBoundary "Outlet 1" on boundaries 33
    sym1: Symmetry on boundaries 9

Multiphysics
  nitf1: NonIsothermalFlow on all domains | Fluid_physics = none; Heat_physics = none
  nitf2: NonIsothermalFlow on all domains | Fluid_physics = spf; Heat_physics = ht2

Mesh
  mesh1 "Mesh 1" (physics-controlled)

Studies
  std1 "Study 1"
    time: Transient "Time Dependent" | tlist = range(0,20,12000); useinitsol = on; initmethod = sol; initstudy = std2
  std2 "Study 2"
    stat: Stationary | solve for = {spf}

Tables
  tbl1: Table "Probe Table 1"
    Time (s) | Temperature (°C), Point: (0, 0, 25.75) | Temperature (°C), Casing Average Temp
    0 | 40.0015 | 39.993
    20 | 40.1405 | 39.9901
    40 | 40.2783 | 40.0079
    60 | 40.4105 | 40.0252
    80 | 40.5379 | 40.042
    100 | 40.6602 | 40.0584
    120 | 40.7751 | 40.0738
    140 | 40.8871 | 40.0888
    160 | 40.9949 | 40.1032
    180 | 41.0978 | 40.1167
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  tbl2: Table "Probe Table 2"
    Time (s) | abs(ht2.ntflux/(T2-avg(T2))) (W/(m^2*K)), Average h1 | abs(ht2.ntflux/(T2-avg(T2))) (W/(m^2*K)), Average h1.1 | abs(ht2.ntflux/(T2-avg(T2))) (W/(m^2*K)), Average h1.2 | abs(ht2.ntflux/(T2-avg(T2))) (W/(m^2*K)), Average h1.3 | abs(ht2.ntflux/(T2-avg(T2))) (W/(m^2*K)), Average h1.4
    0 | 43.4943 | 62.8495 | 44.6137 | 51.2101 | 44.0719
    20 | 276.933 | 2604.6 | 651.197 | 244.199 | 637.342
    40 | 1532.93 | 504.823 | 288.948 | 2507.14 | 289.678
    60 | 190.823 | 415.154 | 186.979 | 189.727 | 186.132
    80 | 142.326 | 406.741 | 161.192 | 148.95 | 160.597
    100 | 123.997 | 407.963 | 149.728 | 134.171 | 149.157
    120 | 113.376 | 408.675 | 141.191 | 125.229 | 140.444
    140 | 108.659 | 412.921 | 136.24 | 120.598 | 135.399
    160 | 106.028 | 415.01 | 132.078 | 117.172 | 131.182
    180 | 105.077 | 417.507 | 129.708 | 115.3 | 128.859
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
Plots
  pg8: PlotGroup1D "Probe Plot Group 8"
    tblp1: Table "Probe Table Graph 1" | table = tbl1
  pg9: PlotGroup1D "Probe Plot Group 9"
    tblp1: Table "Probe Table Graph 1" | table = tbl2