// COMSOL Multiphysics 6.3.0.290 model "Replication.mph"
// Outline of the model tree

Probes
  pdom1: DomainPoint "Domain Point Probe 1" | bndsnap3 = on; coords = {0, 0, 25.75}
    ppb1: PointExpr "Point Probe Expression 1" | expr = T; unit = °C; descr = Temperature; table = tbl1
  bnd1: Boundary "Boundary Probe 1" on boundaries 11-13, 15, 16
    expr = T
    unit = °C
    descr = Temperature
    frame = spatial
    table = tbl1

Geometry
  geom1 "Geometry 1" (3D, length unit mm)
    imp1: Import
      type = cad
      filename = Y:\DC Link Capacitor\CADS 1.2\Recovered Symmetry Step.STEP
      lengthunittype = cad
      assemblycomponentstype = cad
      virtualgeometrytype = cad
      objectstoimporttype = cad
      layerstype = cad
      drillholestype = cad
      componentsstype = cad
      compattrtag = imp1.component
      cellstype = cad
      arcrecognitiontype = cad
      simplifytype = cad
      cadtype = STEP
    del1: Delete "Delete Entities 1" | input = imp1.CutExtrude2
    del2: Delete "Delete Entities 2" | input = imp1.CutExtrude1_CutExtrude1(1)
    fin: Finalize "Form Union"

Materials
  mat1: Common "Core" on all domains
    def: def "Basic"
      thermalconductivity = diag{1.1362, 0.22, 0.22}
      density = 907.17
      heatcapacity = 1888.14
  mat2: Common "Epoxy Resin" on domains 2
    def: def "Basic"
      thermalconductivity = 0.15
      density = 1820
      heatcapacity = 1340
  mat3: Common "PPS" on domains 1
    def: def "Basic"
      thermalconductivity = 15
      density = 1650
      heatcapacity = 1000

Physics
  ht: HeatTransferInSolidsAndFluids on all domains
    dependent variable T
    ShapeProperty.order_temperature = 1
    solid1: SolidHeatTransferModel "Solid 1" (default)
    init1: init "Initial Values 1" (default) | Tinit = 343.15
    ins1: ThermalInsulation (default)
    hs1: HeatSource on domains 3 | heatSourceType = HeatRate; P0 = 0.5
    hf1: HeatFluxBoundary "Heat Flux 1" on boundaries 1-3, 5, 18
      HeatFluxType = ConvectiveHeatFlux
      h = 9.49
      Text = 343.15
    sym1: Symmetry on boundaries 4, 9, 14
    sar1: SurfaceToAmbientRadiation on boundaries 1-3, 5, 18 | epsilon_rad_mat = userdef; epsilon_rad = 0; Tamb = 343.15

Multiphysics
  nitf1: NonIsothermalFlow on all domains | Fluid_physics = none; Heat_physics = ht

Mesh
  mesh1 "Mesh 1" (physics-controlled)

Studies
  std1 "Study 1"
    time: Transient "Time Dependent" | tlist = range(0,20,12000)

Tables
  tbl1: Table "Probe Table 1"
    Time (s) | Temperature (°C), Point: (0, 0, 25.75) | Temperature (°C), Boundary Probe 1
    0 | 70.0002 | 70.0001
    20 | 70.1955 | 70.1069
    40 | 70.3881 | 70.2132
    60 | 70.5757 | 70.3164
    80 | 70.7574 | 70.4167
    100 | 70.9337 | 70.5144
    120 | 71.1054 | 70.6123
    140 | 71.2722 | 70.7089
    160 | 71.4339 | 70.8045
    180 | 71.5907 | 70.8988
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
Plots
  pg1: PlotGroup1D "Probe Plot Group 1"
    tblp1: Table "Probe Table Graph 1" | table = tbl1