// COMSOL Multiphysics 6.3.0.290 model "Replication - Copy.mph"
// Outline of the model tree

Variables
  var1 "Variables 1"
    Tinf = 343.15[K]

Probes
  pdom1: DomainPoint "Core Temp" | bndsnap3 = on; coords = {0, 0, 25.75}
    ppb1: PointExpr "Point Probe Expression 1" | expr = T; unit = °C; descr = Temperature; table = tbl1
  bnd1: Boundary "Average Casing Temp" on boundaries 1, 3-5, 18
    expr = T
    unit = °C
    descr = Temperature
    frame = spatial
    table = tbl1
  pdom2: DomainPoint "Casing Point 1" | bndsnap3 = on; coords = {17.5, 0, 25.75}
    ppb2: PointExpr "Point Probe Expression 2" | expr = T; unit = °C; descr = Temperature; table = tbl1
  dom1: Domain "Domain Probe 1" on all domains | expr = T; unit = K; descr = Temperature; table = tbl1

Geometry
  geom1 "Geometry 1" (3D, length unit mm)
    imp1: Import
      type = cad
      filename = Y:\DC Link Capacitor\CADS 1.2\Geometry with better symmetry.STEP
      lengthunittype = cad
      assemblycomponentstype = cad
      virtualgeometrytype = cad
      objectstoimporttype = cad
      layerstype = cad
      drillholestype = cad
      componentsstype = cad
      compattrtag = imp1.component
      cellstype = cad
      arcrecognitiontype = cad
      simplifytype = cad
      cadtype = STEP
    del1: Delete "Delete Entities 1" | input = imp1.CutExtrude2 domains 1; imp1.CutExtrude1_CutExtrude1(1) domains 1
    fin: Finalize "Form Union"

Materials
  mat1: Common "Core" on all domains
    def: def "Basic"
      thermalconductivity = diag{1.1362, 0.22, 0.22}
      density = 907.17
      heatcapacity = 1888.14
  mat2: Common "Epoxy Resin" on no domains
    def: def "Basic"
      thermalconductivity = 0.15
      density = 1820
      heatcapacity = 1340
  mat3: Common "PPS" on no domains
    def: def "Basic"
      thermalconductivity = 15
      density = 1650
      heatcapacity = 1000

Physics
  ht: HeatTransferInSolidsAndFluids on all domains
    dependent variable T
    ShapeProperty.order_temperature = 1
    solid1: SolidHeatTransferModel "Solid 1" (default)
    init1: init "Initial Values 1" (default) | Tinit = Tinf
    ins1: ThermalInsulation (default)
    hs1: HeatSource on domains 3 | heatSourceType = HeatRate; P0 = 0.714/2
    hf1: HeatFluxBoundary "Heat Flux 1" on boundaries 1, 3-5, 18
      HeatFluxType = ConvectiveHeatFlux
      h = 9.49
      Text = Tinf
    sym1: Symmetry on boundaries 2, 7, 12
    sar1: SurfaceToAmbientRadiation on boundaries 1, 3-5, 18 | epsilon_rad_mat = userdef; epsilon_rad = 0.85; Tamb = Tinf

Multiphysics
  nitf1: NonIsothermalFlow on all domains | Fluid_physics = none; Heat_physics = ht

Mesh
  mesh1 "Mesh 1" (physics-controlled)

Studies
  std1 "Study 1"
    time: Transient "Time Dependent" | tlist = range(0,20,12000)

Tables
  tbl1: Table "Probe Table 1"
    Time (s) | Temperature (°C), Point: (0, 0, 25.75) | Temperature (°C), Boundary Probe 1
    0 | 70.0002 | 70
    20 | 70.1397 | 70.0193
    40 | 70.2771 | 70.0518
    60 | 70.4068 | 70.0958
    80 | 70.5329 | 70.1419
    100 | 70.6568 | 70.1885
    120 | 70.7715 | 70.2369
    140 | 70.8863 | 70.2853
    160 | 71.001 | 70.3336
    180 | 71.1158 | 70.382
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
Plots
  pg1: PlotGroup1D "Probe Plot Group 1"
    tblp1: Table "Probe Table Graph 1" | table = tbl1; xaxisdata = auto; plotcolumns = {2, 3}